*Heading
** Job name: Job-1 Model name: Model-1
** Generated by: Abaqus/CAE 2020
*Preprint, echo=NO, model=NO, history=NO, contact=NO
**
** PARTS
**
*Part, name=Part-1
*End Part
**
*Part, name=Part-2
*End Part
**
**
** ASSEMBLY
**
*Assembly, name=Assembly
**
*Instance, name=Part-1-1, part=Part-1
*Node
      1,  0.430000007,           0.
      2,  0.430003345,           0.
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*Element, type=CAX4R
    1,     1,     2,    39,    38
    2,     2,     3,    40,    39
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*Nset, nset=_PickedSet2, internal, generate
     1,  11137,      1
*Elset, elset=_PickedSet2, internal, generate
     1,  10800,      1
** Section: Section-1
*Solid Section, elset=_PickedSet2, material=Material-Con
,
*End Instance
**
*Instance, name=Part-2-1, part=Part-2
*Node
      1,  0.430119991,           0.
      2,  0.430123329,           0.
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*Element, type=CAX4R
    1,     1,     2,    72,    71
    2,     2,     3,    73,    72
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*Nset, nset=_PickedSet3, internal, generate
     1,  21070,      1
*Elset, elset=_PickedSet3, internal, generate
     1,  20700,      1
** Section: Section-2
*Solid Section, elset=_PickedSet3, material=Material-2
,
*End Instance
**
*Nset, nset=_PickedSet6, internal, instance=Part-1-1, generate
     1,  11137,      1
*Elset, elset=_PickedSet6, internal, instance=Part-1-1, generate
     1,  10800,      1
*Nset, nset=_PickedSet20, internal, instance=Part-1-1
 1,
*Nset, nset=_PickedSet22, internal, instance=Part-1-1, generate
     1,  11101,     37
*Elset, elset=_PickedSet22, internal, instance=Part-1-1, generate
     1,  10765,     36
*Nset, nset=_PickedSet23, internal, instance=Part-1-1, generate
  1,  37,   1
*Elset, elset=_PickedSet23, internal, instance=Part-1-1, generate
  1,  36,   1
*Nset, nset=_PickedSet28, internal, instance=Part-2-1, generate
  1,  70,   1
*Elset, elset=_PickedSet28, internal, instance=Part-2-1, generate
  1,  69,   1
*Nset, nset=_PickedSet30, internal, instance=Part-1-1, generate
     1,  11137,      1
*Nset, nset=_PickedSet30, internal, instance=Part-2-1, generate
     1,  21070,      1
*Elset, elset=_PickedSet30, internal, instance=Part-1-1, generate
     1,  10800,      1
*Elset, elset=_PickedSet30, internal, instance=Part-2-1, generate
     1,  20700,      1
*Nset, nset=_PickedSet31, internal, instance=Part-1-1, generate
     1,  11137,      1
*Elset, elset=_PickedSet31, internal, instance=Part-1-1, generate
     1,  10800,      1
*Nset, nset=_PickedSet32, internal, instance=Part-2-1, generate
     1,  21070,      1
*Elset, elset=_PickedSet32, internal, instance=Part-2-1, generate
     1,  20700,      1
*Surface, type=NODE, name=_PickedSet31_CNS_, internal
_PickedSet31, 1.
*Surface, type=NODE, name=_PickedSet32_CNS_, internal
_PickedSet32, 1.
** Constraint: Constraint-1
*Tie, name=Constraint-1, adjust=yes
_PickedSet32_CNS_, _PickedSet31_CNS_
*End Assembly
**
** MATERIALS
**
*Material, name=Material-2
*Density
1.,
*Elastic
 4.5e+11, 0.3
*Material, name=Material-Con
*Density
1.,
*Elastic
 5e+11, 0.35
**
** INTERACTION PROPERTIES
**
*Surface Interaction, name=IntProp-1
1.,
*Friction, slip tolerance=0.005
 0.5,
*Surface Behavior, pressure-overclosure=HARD
**
** BOUNDARY CONDITIONS
**
** Name: y-direction Type: Displacement/Rotation
*Boundary
_PickedSet23, 2, 2
** Name: y-direction2 Type: Displacement/Rotation
*Boundary
_PickedSet28, 2, 2
**
** INTERACTIONS
**
** Interaction: Int-1
*Contact
*Contact Inclusions, ALL EXTERIOR
*Contact Property Assignment
 ,  , IntProp-1
** ----------------------------------------------------------------
**
** STEP: Step-1
**
*Step, name=Step-1, nlgeom=NO
*Static
1., 1., 1e-05, 1.
**
** LOADS
**
** Name: Load-2   Type: Body force Using Field: AnalyticalField-1
*Dload
Part-1-1.1, BR, 1.59879e+09
Part-1-1.2, BR, 1.59876e+09
Part-1-1.3, BR, 1.59873e+09
Part-1-1.4, BR, 1.5987e+09
Part-1-1.5, BR, 1.59867e+09
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Part-2-1.20700, BR, 1.59576e+09
**
** OUTPUT REQUESTS
**
*Restart, write, frequency=0
**
** FIELD OUTPUT: F-Output-1
**
*Output, field, variable=PRESELECT
**
** HISTORY OUTPUT: H-Output-1
**
*Output, history, variable=PRESELECT
*End Step
